// SBML level 3 version 1
// SBML generated from Reactome version 95 on 11/25/25, 4:14 AM using JSBML version 1.5.

model pathway_1855192()
  // IPs transport between nucleus and ER lumen
  // Inositol phosphate IP6 is imported to the endoplasmic reticulum (ER) lumen from the nucleus (Caffrey et al. 1999). The molecular details of these transport processes remain uncertain.
  // reactome:R-HSA-1855192 GO:0033271
  // isDescribedBy pubmed:9923613

  // Compartments:
  compartment endoplasmic_reticulum_lumen;  // GO:0005788
  compartment nucleoplasm;  // GO:0005654

  // Species:
  // Derived from a Reactome SimpleEntity. This is a small compound
  species IP6_endoplasmic_reticulum_lumen in endoplasmic_reticulum_lumen = 0.1; IP6_endoplasmic_reticulum_lumen is "IP6 [endoplasmic reticulum lumen]";  // reactome:R-ALL-2024018
  // Derived from a Reactome SimpleEntity. This is a small compound
  species IP6_nucleoplasm in nucleoplasm = 0.3; IP6_nucleoplasm is "IP6 [nucleoplasm]";  // reactome:R-ALL-2023929

  // Parameters:
  Ku = 10;
  Ur = 0.7;
  log_K_in = 2.566427;
  log_K_out = 2.866873;
  log_lambda_1 = 2.866496;
  M = 1;
  epsilon = 1e-6;
  mu_2023929 = 0.5;
  mu_2024018 = 0.5;
  z_2023929 = 0;
  z_2024018 = 0;
  y_2023929 = 0;
  y_2024018 = 0;
  y2_2023929 = 0;
  y2_2024018 = 0;

  // Assignment rules:
  K_in := 10^log_K_in;
  K_out := 10^log_K_out;
  lambda_1 := 10^log_lambda_1;

  // Rate rules:
  y_2023929' = (IP6_nucleoplasm - y_2023929)/(time + epsilon);
  y_2024018' = (IP6_endoplasmic_reticulum_lumen - y_2024018)/(time + epsilon);
  y2_2023929' = (IP6_nucleoplasm^2 - y2_2023929)/(time + epsilon);
  y2_2024018' = (IP6_endoplasmic_reticulum_lumen^2 - y2_2024018)/(time + epsilon);

  // Reactions:
  // Inositol 1,2,3,4,5,6-hexakisphosphate (IP6) translocates from the nucleus to the endoplasmic reticulum (ER) lumen (Caffrey et al. 1999).
  reaction_1855187: IP6_nucleoplasm => IP6_endoplasmic_reticulum_lumen; lambda_1*IP6_nucleoplasm^1; reaction_1855187 is "IP6 transports from the nucleus to the ER lumen";  // reactome:R-HSA-1855187 GO:0051169; isDescribedBy pubmed:9923613; reactome:R-HSA-1855187; GO:0051169
  reaction_input: => IP6_nucleoplasm; K_in;
  reaction_output_degradation: IP6_endoplasmic_reticulum_lumen => ; K_out*IP6_endoplasmic_reticulum_lumen;

  // Constraints:
  constraint abs(y_2023929 - mu_2023929) <= 1e-3;  // Mean of nucleoplasm IP6 (y_2023929) must equal target mu_2023929 = 0.5
  constraint abs(y_2024018 - mu_2024018) <= 1e-3;  // Mean of ER lumen IP6 (y_2024018) must equal target mu_2024018 = 0.5
end
